variable initTemp equal 300.          	# desired temperature
variable sigma equal 15000.    		# applied stress in bar

variable equilTime equal 5000        	# number of increment to equilibrate the temperature
variable runTime equal 15000   	# number of increment to calibrate the velocity
variable energyConv equal 1602191.7     # conversion factor


dimension 3
boundary p p s
units metal
atom_style atomic
read_data grapepdis.atom


# store initial position of bottom and top planes along z

# store initial position of bottom and top planes along y
variable tmp0 equal "zlo+45"
variable zlo0 equal ${tmp0}
variable tmp1 equal "zhi-45"
variable zhi0 equal ${tmp1}


pair_style      eam/alloy
pair_coeff      * * FeNiCrCoCu-heafixed.eam.alloy.txt  Cr Ni Co
neighbor        2.0 bin
neigh_modify    delay 5


# definition of the upper and lower blocks
region upper block INF INF INF INF ${zhi0} INF units box
region lower block INF INF INF INF INF ${zlo0} units box

# definition of the group
group upper region upper
group lower region lower
group mobile subtract all upper lower

# fix top and botton group
fix 1 lower setforce NULL 0.0 0.0
fix 2 upper setforce NULL 0.0 0.0

# compute specific quantities
compute pot_energy all pe/atom
compute stress all stress/atom NULL

dump 1 all custom 1000 dump.minimize id x y z c_pot_energy

# create the dislocation
timestep 0.010
minimize 0.0 1.0e-8 10000 100000

# step 2: equilibrate the temperature		  #
###################################################
timestep 0.001
undump 1
reset_timestep 0
unfix 1
unfix 2
# define temperature
compute temp1 mobile temp

# initialize the velocities
velocity mobile create ${initTemp} 16723 units box
velocity mobile zero linear
velocity mobile zero angular

# equilibrate the temperature
fix 1 mobile nve
fix 2 mobile temp/rescale 1 ${initTemp} ${initTemp} 1.0 0.5
fix_modify 2 temp temp1

# boundary condition
fix 3 lower setforce NULL 0.0 0.0
fix 4 upper setforce NULL 0.0 0.0

thermo 100
thermo_modify temp temp1

thermo_style custom step pe ke temp pxx pyy pzz pxy pyz pxz
dump 1 all custom 1000 dump.equilibration id x y z c_pot_energy c_stress[1] c_stress[2] c_stress[3] c_stress[4] c_stress[5] c_stress[6]

run ${equilTime}

# step 3: MD at finite temperatute and with constant force                                             #
# force (eV/angstrom) = stress (bar) * S (angstrom*angstrom) / (number of atoms in upper) / 1602191.7) #
########################################################################################################
unfix 1
unfix 2
unfix 3
unfix 4
undump 1
uncompute temp1
reset_timestep 0

timestep 0.002

# define the force to apply
variable nupper equal count(upper)
variable nuper1 equal ${nupper}
print "number of atoms in upper == ${nupper}"
variable tmp2 equal "lz"
variable tmp3 equal "lx"

variable tmp4 equal v_tmp2*v_tmp3/v_nupper*v_sigma/v_energyConv
variable appforce equal ${tmp4}

# define temperature
compute temp1 mobile temp

# define velocity on boundary
velocity upper set 0. 0. 0. units box
velocity lower set 0. 0. 0. units box

# define boundary conditions
fix 1 upper setforce NULL NULL 0.0
fix 2 lower setforce NULL 0.0 0.0
fix 3 upper aveforce 0.0 ${appforce} 0.0
fix 4 upper rigid group 1 upper

# no temperature control
fix 5 mobile nve

thermo 100
thermo_modify temp temp1

dump 1 all custom 5000 dump.shear id x y z
dump 2 all custom 500 dump.shear.unwrap id xu yu zu

run ${runTime}
